*Heading
** Job name: Abaqus-Beam-Th-12 Model name: Beam-Th-12
** Generated by: Abaqus/CAE 2020
*Preprint, echo=NO, model=NO, history=NO, contact=NO
**
** PARTS
**
*Part, name=Beam
*Node
      1,          70.,           1.,   1.20000005
      2,          70.,           0.,   1.20000005
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*Element, type=C3D20H
   1,    23,    24,    26,    25,     1,     2,     4,     3, 12852, 12851, 12850, 12849, 12853, 12854, 12855,
      12856, 12858, 12857, 12859, 12860
   2,    25,    26,    28,    27,     3,     4,     6,     5, 12850, 12863, 12862, 12861, 12855, 12864, 12865,
      12866, 12860, 12859, 12867, 12868
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*Nset, nset=WholePart, generate
     1,  43778,      1
*Elset, elset=WholePart, generate
    1,  5830,     1
*Nset, nset=LeftEnd
 12827, 12828, 12829, 12830, 12831, 12832
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*Elset, elset=LeftEnd, generate
 5821,  5830,     1
** Section: Homo
*Solid Section, elset=WholePart, material=neoHookean
,
*End Part
**
**
** ASSEMBLY
**
*Assembly, name=Assembly
**
*Instance, name=Beam-1, part=Beam
*End Instance
**
*End Assembly
**
** MATERIALS
**
*Material, name=neoHookean
*Depvar
      9,
*User Material, constants=1
 1e+06,
** ----------------------------------------------------------------
**
** STEP: Growth
**
*Step, name=Growth, nlgeom=YES, inc=200
*Static
1e-05, 1., 1e-05, 0.1
**
** BOUNDARY CONDITIONS
**
** Name: LeftEndBC Type: Displacement/Rotation
*Boundary
Beam-1.LeftEnd, 1, 1
Beam-1.LeftEnd, 2, 2
Beam-1.LeftEnd, 3, 3
** Name: WholeRegion Type: Displacement/Rotation
*Boundary
Beam-1.WholePart, 2, 2
**
** OUTPUT REQUESTS
**
*Restart, write, frequency=0
**
** FIELD OUTPUT: F-Output-1
**
*Output, field
*Node Output
COORD, U
*Element Output, directions=YES
S, SDV
**
** HISTORY OUTPUT: H-Output-1
**
*Output, history, variable=PRESELECT
*End Step
