*Heading
*PARAMETER
nUvrm = 5
nPROPS = 8
** Nodes---------------------------------------------------------------
*Node, NSET=AllNodes
*INCLUDE, INPUT=InputFiles\Coords-All.inp
** Elements------------------------------------------------------------
** User element definition, list of active dof in the first node, refer to ABAQUS's convention, "8" is pressure "11" is temperature
*User element, type=u3, nodes=20, coordinates=3, properties=<nPROPS>, variables=<nUvrm>
1, 2, 3, 11, 8
9, 1, 2, 3, 11
*Element, type=u3, Elset=UserElem
*INCLUDE, INPUT=InputFiles\Elems-All.inp
** Dummy element overlaid on the user elements
*Element, type=C3D20, Elset=Dummy
*INCLUDE, INPUT=InputFiles\Elems-Dummy.inp
** Section: HomoSection
*Solid Section, elset=Dummy, material=Dummy
** SETS ---------------------------------------------------------------
*INCLUDE, INPUT=InputFiles\Elems-Nodes-Set.inp
*Elset, elset=Sample-Dummy, generate
 100001,  102000,  1
** MATERIALS ----------------------------------------------------------
*PARAMETER
PI = 3.14159265359
C0 = 0.4E+06
Nu = 0.499
MValue = 100.0
bValue = 50.0
Theta_M = 0.0
Theta_b = PI / 2.0
h = 0.05 / 2.0
TotalT = 1.0
** PROPS(1) - C0: Material Parameter (Pa)
** PROPS(2) - Nu: Poisson's ratio
** PROPS(3) - MValue: Magnetization magnitude (kA/m)
** PROPS(4) - bValue: Magnetic induction magnitude (mT)
** PROPS(5) - Theta_M: Magnetization direction angle (Rad)
** PROPS(6) - Theta_b: Magnetic induction direction angle (Rad)
** PROPS(7) - h: Half thickness (m)
** PROPS(8) - TotalT: Total loading time (s)
*UEL Property, elset=UserElem
<C0>, <Nu>, <MValue>, <bValue>, <Theta_M>, <Theta_b>, <h>, <TotalT>
** DUMMY MATERIAL
*MATERIAL,NAME=Dummy
*Hyperelastic, Neo Hooke
1.0e-10, 1.0e10
*User output variables
<nUvrm>
*Amplitude, name=Amp-Load
0.0, 0.0, 0.9, 1.0, 1.0, 0.0
** --------------------------------------------------------------------
** STEP: MagneticLoad
**
*Step, name=MagneticLoad, nlgeom=YES, inc=200
** *Static, stabilize, factor=0.0003, allsdtol=0, continue=NO
*Static
** <init_step_size>, <end_time>, <min_step_size>, <max_step_size>
0.01, <TotalT>, 1e-05, 0.10
** ---- BOUNDARY CONDITIONS ----
*Boundary
LeftEnd, 1, 3
AllNodes, 2, 2
*Boundary
AllNodes, 11,11
** ---- LOADS ----
** *Dload, amplitude=Amp-Load
** UserElem, BX, -20.
** OUTPUT REQUESTS ----------------------------------------------------
*Output, field, freq=1
*Node Output, NSET=AllNodes
 U, COORD
*Element Output, elset=Dummy
 UVARM
*End Step
